New "Line.l1" phases=3 bus1=sourcebus bus2=loadbus1 length=0.01 units=none r1=0.1 x1=0.1 r0=0.1 x0=0.1 C1=0 C0=0
New "Line.l2" phases=3 bus1=loadbus1 bus2=loadbus2 length=0.01 units=none r1=0.1 x1=0.1 r0=0.1 x0=0.1 C1=0 C0=0
