New "RegControl.reg1" transformer=Reg1 winding=2 tapwinding=2 vreg=122 band=2 ptratio=20 CTprim=700 R=3 X=9
New "RegControl.reg2" transformer=Reg2 winding=2 tapwinding=2 vreg=122 band=2 ptratio=20 CTprim=700 R=3 X=9
New "RegControl.reg3" transformer=Reg3 winding=2 tapwinding=2 vreg=122 band=2 ptratio=20 CTprim=700 R=3 X=9
